# Расчет цепей стабилизатора A8586
fsw := 1500000  # Частота переключения
Vout := 5  # Выходное напряжение
Vin := 30  # Входное напряжение
Vinmin := 6  # Минимальное входное напряжения
Iomax := 3.5  # Максимальный выходной ток
dIl := 0.3*Iomax
Se2mhz := 2.2
Lo := Vout/(fsw*dIl)*(1 - Vout/Vin)
Lo = 2.6455e-6  # Расчетная индуктивность катушки
Lo := 0.0000047  # Принятая индуктивность катушки
Se := Se2mhz*((1/2000000 - 0.0000001)/(1/fsw - 0.0000001))
Lmin := Vout/Se*(1 - 0.18*Vinmin/Vout)
Lmin = 2.52424  # Минимально допустимая индуктивность катушки
Ilpk := Iomax + Vout/(2*fsw*Lo)*(1 - Vout/Vin)
Ilpk = 3.79551  # Пиковый ток через катушку
dVin := 0.05
Cmin := Iomax/(0.85*fsw*dVin)*Vout/Vin*(1 - Vout/Vin) = 7.62527e-6  # Минимально допустимая емкость входного конденсатора
Cout := 0.000020  # Принятая емкость выходного конденсатора
ESR := 0.005
ESL := 0.000000001
dVout := dIl*ESR + (Vin - Vout)/Lo*ESL + dIl/(8*fsw*Cout) = 0.0149441
Avol := 1000  # Error amplifier voltage gain
Vfb := 0.792
Gcs := 9  # Current sense transconductance
Avdc := Vout/Iomax*Gcs*Avol*Vfb/Vout = 2036.57  # -DC voltage gain
gm := 0.000060  # -error amplifier transconductance
Cz := 0.0000000002
fp1 := gm/(2*π*Cz*Avol) = 47.7465
fc := fsw*0.1  # -crossover frequency
Rz := 2*π*Cout*fc/(gm*Gcs)*Vout/Vfb = 220370  # -Сопротивление резистора коррекции
Czmin := 4/(2*π*Rz*fc) = 1.92591e-11  # -Емкость конденсатора коррекции
1/(2*π*Cout*ESR) = 1591549
fsw/2 = 750000
Venh := 1.2  # minimum - 1.2 maximum 1.85
Venl := 1.0  # minimum - 1.0 maximum 1.4
R2 := 22000
R1 := 100000  # -Резисторы в цепи EN
Vstart := (R1 + R2)/R2*Venh = 6.65455
Vstop := (R1 + R2)/R2*Venl = 5.54545
Rfb2 := 41200  # -Нижний резистор в делителе напряжения
Rfb1 := (Vout - Vfb)/Vfb*Rfb2 = 218901
Rfb1 := 220000  # -Верхний резистор в делителе напряжения
(x - Vfb)/Vfb*Rfb2 - Rfb1 solve → 5.02112621359  # -Результирующее напряжение
